x[0] := 6
x[0] := 6
y[0] := 6  # x
x[1] := 6
y[1] := 8
x[2] := 8
y[2] := 6
x[3] := x[0]
y[3] := y[0]
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P := [x[0], x[1], x[2], x[3]; y[0], y[1], y[2], y[3]; 1, 1, 1, 1]
T_s(dx, dy) := [1, 0, -dx; 0, 1, -dy; 0, 0, 1]
RS(φ) := [cos(φ), sin(φ), 0; -sin(φ), cos(φ), 0; 0, 0, 1]
φ := 90
φ_rad := φ*π/180
Δx := 2
Δy := 3
P1 := T_s(x[0], y[0])*P
P1 = [0, 0, 2, 0; 0, 2, 0, 0; 1, 1, 1, 1]
x1 := transpose(P1)[:, 0]
transpose(x1) = [0, 0, 2, 0]
y1 := transpose(P1)[:, 1]
transpose(y1) = [0, 2, 0, 0]
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P2 := RS(φ_rad)*P1
P2 = [0, 2, 0, 0; 0, 0, -2, 0; 1, 1, 1, 1]
x2 := transpose(P2)[:, 0]
transpose(x2) = [0, 2, 0, 0]
y2 := transpose(P2)[:, 1]
transpose(y2) = [0, 0, -2, 0]
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P3 := T_s(-Δx, -Δy)*P2
P3 = [2, 4, 2, 2; 3, 3, 1, 3; 1, 1, 1, 1]
x3 := transpose(P3)[:, 0]
transpose(x3) = [2, 4, 2, 2]
y3 := transpose(P3)[:, 1]
transpose(y3) = [3, 3, 1, 3]
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P4 := T_s(-x[0], -y[0])*P3
P4 = [8, 10, 8, 8; 9, 9, 7, 9; 1, 1, 1, 1]
x4 := transpose(P4)[:, 0]
transpose(x4) = [8, 10, 8, 8]
y4 := transpose(P4)[:, 1]
transpose(y4) = [9, 9, 7, 9]
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