A := transpose([-4, -3, 1])
B := transpose([0, 3, 1])
C := transpose([4, -3, 1])
A1 := A
M := augment(A, B, C, A1)
M = [-4, 0, 4, -4; -3, 3, -3, -3; 1, 1, 1, 1]
R0(φ) := [cos(φ), -sin(φ), 0; sin(φ), cos(φ), 0; 0, 0, 1]
φ_grad := 90
φ_rad := φ_grad*π/180
X := transpose(M)[:, 0]
Y := transpose(M)[:, 1]
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M1 := R0(φ_rad)*M
X1 := transpose(M1)[:, 0]
Y1 := transpose(M1)[:, 1]
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M2 := R0(φ_rad)*M1
X2 := transpose(M2)[:, 0]
Y2 := transpose(M2)[:, 1]
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M3 := R0(φ_rad)*M2
X3 := transpose(M3)[:, 0]
Y3 := transpose(M3)[:, 1]
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